<?xml version="1.0"?>

<Node>
    <RequiredPlugin name="Sofa.PointCloud"/>

    <InteractiveCamera name="camera"/>
    <PointCloudRenderer camera="@camera"/>

    <PointCloudContainer name="container1" filename="splats/spot.ply"/>
    <PointCloudContainer name="container2" />

    <PointCloudTransform name="transform" input="@container1" output="@container2"/>

    <PointCloudVisualModel name="visual" geometry="@container2"/>
</Node>
