<?xml version="1.0"?>

<Node>
    <RequiredPlugin name="Sofa.PointCloud"/>

    <InteractiveCamera name="camera"/>
    <PointCloudRenderer camera="@camera" withCuda="0" printLog="0"/>

    <EulerImplicitSolver/>
    <SparseLDLSolver/>

    <Node>
        <MechanicalObject name="state" template="Rigid3" showObject="true" position="-1 0 0 0 0 0 1"/>
        <UniformMass totalMass="3"/>
        <PointCloudContainer name="container1" filename="splats/spot.ply"/>
        <PointCloudVisualModel name="visual" geometry="@container1" frames="@state.position" initFrames="@state.position"/>
    </Node>

    <Node>
        <MechanicalObject name="state2" template="Rigid3" showObject="true" position="1 0 0 0 1 0 0"/>
        <UniformMass totalMass="3"/>
        <PointCloudContainer name="container2" filename="splats/spot.ply"/>
        <PointCloudVisualModel name="visual2" geometry="@container2" frames="@state2.position" />
    </Node>
</Node>
